** ----------------------------------------------------------------
** STEPS
*STEP, NAME=STEP-{nStep}
** RESTART, WRITE, FREQ=0
*HEATTRANSFER, END=PERIOD
1.0, {nLoads}.0, 1.0, 1.0
*CONTROLS, PARAMETERS=TIME INCREMENTATION
,,,200
** BOUNDARY CONDITIONS
*INCLUDE, INPUT=condicionesContorno{i}.inp
** OUTPUT REQUESTS
*NODE PRINT,FREQ=1
NT,
*NODE FILE,FREQ=1
NT,
*OUTPUT,FIELD,FREQ=1
NT,
*ENDSTEP
